OpenVSP model (file version 5), 6 components.
Geometry view with OpenVSP parameter names; values to 6 digits, angles in degrees, lengths in the model's unit.
Overall bounding box: X_Min=-0.0178339 X_Len=29.5644 Y_Min=-23.0666 Y_Len=46.1333 Z_Min=-2.96926 Z_Len=6.59313

Wing "BWB"
  location (X Y Z) 0 0 0, rotation 0 0 0
  symmetric about XZ
  bounding box size 14.6405 23.0666 2.96926
  totals: TotalSpan=23.0666 TotalProjectedSpan=23.0666 TotalChord=5.24296 TotalArea=122.688 TotalAR=4.33679 RelativeDihedralFlag=1
  root: chord 14.6315, twist 0, NACA 63-series A=0 IdealCl=0 ThickChord=0.2
  sections:
    n  Span     Root_Chord  Tip_Chord  Area     Sweep  Sweep_Location  Dihedral  Twist  Twist_Location  tip airfoil
    1  5.89481  14.6315     2.68245    51.0312  58     0               0         0      0.25            NACA 4-series Camber=0 CamberLoc=0.2 ThickChord=0.25
    2  5.63851  2.68245     0.975435   10.3125  25     0               0         0      0.25            NACA 4-series Camber=0 CamberLoc=0.2 ThickChord=0.1

Conformal "Fuel", child of "BWB"
  location (X Y Z) 0 0 0, rotation 0 0 0
  symmetric about XZ
  bounding box size 6.16543 8.25273 2.00804
  Design: ChordTrimFlag=0 ChordTrimMax=0.8 ChordTrimMin=0.25 Offset=0.1 UTrimFlag=1 UTrimMax=0.35 UTrimMin=0.15 V1TrimBegin=0.85 V1TrimEnd=0.15 V1TrimFlag=1 V2TrimBegin=0.4 V2TrimEnd=0.6 V2TrimFlag=1

Wing "Tail"
  location (X Y Z) 24.5 5 0.75, rotation 90 0 -10
  symmetric about XZ
  bounding box size 5.0466 17.1711 3.48164
  totals: TotalSpan=10 TotalProjectedSpan=7.07107 TotalChord=2.25 TotalArea=22.5 TotalAR=2.22222 RelativeDihedralFlag=1
  root: chord 3.5, twist 0, NACA 4-series Camber=0 CamberLoc=0.2 ThickChord=0.1
  sections:
    n  Span  Root_Chord  Tip_Chord  Area   Sweep  Sweep_Location  Dihedral  Twist  Twist_Location  tip airfoil
    1  5     3.5         1          11.25  35     0               -45       0      0.25            as above
  SS_Control "SS_CONT_0": UStart=0.38 UEnd=0.6 Length_C_Start=0.4 Length_C_End=0.4 Length_Start=1.26 Length_End=0.6 LE_Flag=0 Surf_Type=2

Wing "BWB"
  location (X Y Z) 0 0 0, rotation 0 0 0
  symmetric about XZ
  bounding box size 29.2811 46.1333 5.93851
  totals: TotalSpan=46.1333 TotalProjectedSpan=46.1333 TotalChord=10.4859 TotalArea=490.75 TotalAR=4.33679 RelativeDihedralFlag=1
  root: chord 29.263, twist 0, NACA 63-series A=0 IdealCl=0 ThickChord=0.2
  sections:
    n  Span     Root_Chord  Tip_Chord  Area     Sweep  Sweep_Location  Dihedral  Twist  Twist_Location  tip airfoil
    1  11.7896  29.263      5.36489    204.125  58     0               0         0      0.25            NACA 4-series Camber=0 CamberLoc=0.2 ThickChord=0.25
    2  11.277   5.36489     1.95087    41.25    25     0               0         0      0.25            NACA 4-series Camber=0 CamberLoc=0.2 ThickChord=0.1

Conformal "Fuel", child of "BWB"
  location (X Y Z) 0 0 0, rotation 0 0 0
  symmetric about XZ
  bounding box size 12.4752 16.5055 4.34019
  Design: ChordTrimFlag=0 ChordTrimMax=0.8 ChordTrimMin=0.25 Offset=0.1 UTrimFlag=1 UTrimMax=0.35 UTrimMin=0.15 V1TrimBegin=0.85 V1TrimEnd=0.15 V1TrimFlag=1 V2TrimBegin=0.4 V2TrimEnd=0.6 V2TrimFlag=1

Wing "Tail"
  location (X Y Z) 24.5 5 0.75, rotation 90 0 -10
  symmetric about XZ
  bounding box size 5.0466 17.1711 3.48164
  totals: TotalSpan=10 TotalProjectedSpan=7.07107 TotalChord=2.25 TotalArea=22.5 TotalAR=2.22222 RelativeDihedralFlag=1
  root: chord 3.5, twist 0, NACA 4-series Camber=0 CamberLoc=0.2 ThickChord=0.1
  sections:
    n  Span  Root_Chord  Tip_Chord  Area   Sweep  Sweep_Location  Dihedral  Twist  Twist_Location  tip airfoil
    1  5     3.5         1          11.25  35     0               -45       0      0.25            as above
  SS_Control "SS_CONT_0": UStart=0.38 UEnd=0.6 Length_C_Start=0.4 Length_C_End=0.4 Length_Start=1.26 Length_End=0.6 LE_Flag=0 Surf_Type=2
